!**********************
!PROBLEM: HOMEWORK 1 *
!**********************

FINISH
/CLEAR,START,NEW
/TITLE,HOMERWORK 1
! >>> PARAMETERS MODEL <<<
*SET,bottom_chord,4000
*SET,top_chord,4000
*SET,h_struts,4000
*SET,o_struts,3500
*SET,sez_one,1000
*SET,sez_two,600
*SET,sez_three,400

! >>> PROPERTIES MATERIAL <<<
*SET,E_Young,210000
*SET,ni,0.3

! >>> LOAD CONDITIONS <<<
*SET,F,(20000*(bottom_chord/1000)*6)/7

/PREP7
ET,1,180
ET,2,180
ET,3,180
R,1,sez_one
R,2,sez_two
R,3,sez_three
MP,EX,1,E_Young
MP,PRXY,1,ni
N,1,0,0,0
N,2,bottom_chord,0,0
N,3,bottom_chord*2,0,0
N,4,bottom_chord*3,0,0
N,5,bottom_chord*4,0,0
N,6,bottom_chord*5,0,0
N,7,bottom_chord*6,0,0
N,8,bottom_chord,h_struts,0
N,9,bottom_chord*2,h_struts,0
N,10,bottom_chord*3,h_struts,0
N,11,bottom_chord*4,h_struts,0
N,12,bottom_chord*5,h_struts,0
N,13,0,0,o_struts
N,14,bottom_chord,0,o_struts
N,15,bottom_chord*2,0,o_struts
N,16,bottom_chord*3,0,o_struts
N,17,bottom_chord*4,0,o_struts
N,18,bottom_chord*5,0,o_struts
N,19,bottom_chord*6,0,o_struts
N,20,bottom_chord,h_struts,o_struts
N,21,bottom_chord*2,h_struts,o_struts
N,22,bottom_chord*3,h_struts,o_struts
N,23,bottom_chord*4,h_struts,o_struts
N,24,bottom_chord*5,h_struts,o_struts
SAVE

! >>> ELEMENT <<<
TYPE,1
Real,1
Mat,1

E,1,2
E,2,3
E,3,4
E,4,5
E,5,6
E,6,7
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E,12,24

TYPE,2
Real,2
Mat,1
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E,23,12

TYPE,3
Real,2
Mat,1
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E,17,24
SAVE

! >>> CONSTRAINT <<<
D,1,ux,0
D,1,uy,0
D,7,uy,0
D,13,ux,0
D,13,uy,0
D,19,uy,0
D,all,uz,0

! >>> FORCE <<<
F,1,fy,-F
F,2,fy,-F
F,3,fy,-F
F,4,fy,-F
F,5,fy,-F
F,6,fy,-F
F,7,fy,-F
F,13,fy,-F
F,14,fy,-F
F,15,fy,-F
F,16,fy,-F
F,17,fy,-F
F,18,fy,-F
F,19,fy,-F
SAVE

! >>> SOLUTION <<<
/SOLU
NLGEOM,ON
SOLCONTROL,ON
TIME,1
PIVCHECK,OFF
SOLVE

! >>> POST-PROCESS <<<
/POST1

PLDISP,1
PRNSOL,U,COMP

ETABLE,AXIALFORCE,SMISC,1
ETABLE,AXIALSTRESS,LS,1

PLETAB,AXIALFORCE

PLETAB,AXIALSTRESS

PRETAB,AXIALFORCE,AXIALSTRESS
PRRSOL,F

!*************************
!SECOND PART HOMEWORK 1  *
!*************************

! >>> MODIFY NODES <<<<
*DO,delta1,h_struts,2*h_struts,100
*DO,delta2,delta1,2*h_struts,100
/PREP7
NMODIF,9,bottom_chord*2,delta1,0
NMODIF,10,bottom_chord*3,delta2,0
NMODIF,11,bottom_chord*4,delta1,0
NMODIF,21,bottom_chord*2,delta1,o_struts
NMODIF,22,bottom_chord*3,delta2,o_struts
NMODIF,23,bottom_chord*4,delta1,o_struts

! >>> SOLUTION <<<
/SOLU
NLGEOM,ON
SOLCONTROL,ON
TIME,1
PIVCHECK,OFF
SOLVE

! >>> POST-PROCESS <<<
/POST1
*GET,UMAX15,NODE,15,U,Y
*GET,UMAX16,NODE,16,U,Y
*GET,UMAX17,NODE,17,U,Y

! >>> WRITE THE FILE <<<
*CFOPEN,umaxNEW,txt,,APPEND
*VWRITE,delta1,delta2,UMAX15,UMAX16,UMAX17
(F20.10,F20.10,F20.10,F20.10,F20.10)
*CFCLOS
FINISH
PARSAV,SCALAR,PARAMETRI,PARM
PARRES,NEW,PARAMETRI,PARM
*ENDDO
*ENDDO
